// COMSOL Multiphysics 4.3a (Build: 161) model "dimensionless_oneD.mph"
// Outline of the model tree

Geometry
  geom1 "Geometry 1" (1D, length unit m)
    i1: Interval | p = 0, 1
    fin: Finalize "Form Union"

Physics
  c: CoefficientFormPDE "in plane evacuation" on all domains
    dependent variable P
    cfeq1: CoefficientFormPDE (default) | c = P; f = 0; da = 1
    zflx1: ZeroFluxBoundary "Zero Flux 1" (default)
    init1: init "Initial Values 1" (default) | P = 1
    dir1: DirichletBoundary "Dirichlet Boundary Condition 1" on boundaries 1 | r = 0.05
  ge: GlobalEquations "through thickness evacuation"
    ge1: GlobalEquations | name = P2; equation = P2t+(P2^2-0.05^2); initialValueU = 1; valueType = complex

Mesh
  mesh1 "Mesh 1"
    size: MeshSizeDefault | hauto = 1
    auto_f1: Edge "Edge 1a" on remaining entities

Studies
  std1 "Study 1"
    time: Transient "Time Dependent" | tlist = range(0,0.1,20)

Solver configurations
  sol1 "Solver 1" (study std1)
    v1: Variables "Dependent Variables 1"
    t1: Time "Time-Dependent Solver 1" | tlist = range(0,0.1,20)
      dDef: Direct
      fc1: FullyCoupled

Datasets
  dset1: Solution | solution = sol1

Derived values
  av1: AvLine "Line Average 1" on domains 1 | data = dset1; table = tbl1; expr = P

Tables
  tbl1: Table
    // Line Average 1 (P)
    Time | Dependent variable P (1)
    0 | 0.961359
    0.1 | 0.786034
    0.2 | 0.701025
    0.3 | 0.635607
    0.4 | 0.58163
    0.5 | 0.53647
    0.6 | 0.497857
    0.7 | 0.464467
    0.8 | 0.434905
    0.9 | 0.408971
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
Plots
  pg1: PlotGroup1D "1D Plot Group 1" | data = dset1
    lngr1: LineGraph on all domains | expr = P; xdata = expr; xdataexpr = x
  pg3: PlotGroup1D "mass" | data = none
    tblp1: Table "Table Graph 1" | table = tbl1
  pg4: PlotGroup1D "end of line"
    data = dset1
    xlabel = Dimensionless time t*
    ylabel = Dimensionless pressure P*
    manualgrid = on
    xspacing = 1
    yspacing = 0.1
    ptgr1: PointGraph on boundaries 2 | expr = P; legends = In plane
    glob1: Global (disabled) | expr = exp(-0.9*t^0.6)
    glob2: Global | expr = P2; legends = Transverse

Exports
  plot1: Plot | filename = percent_loss
  plot2: Plot | filename = through_thickness
  img1: Image1D "1D Image 1"
    size = manual
    unit = px
    width = 800
    height = 500
    epsfilename = dimensionless_plot
    options = on
    axes = on