// COMSOL Multiphysics 4.3a (Build: 161) model "full_barrel.mph"
// This solves the air extraction in a sandwich panel.
// Outline of the model tree

Parameters
  K = 6e-14[m^2]  // in plane Permeability
  mu = 1.85e-5[Pa*s]  // air viscosity
  alpha = 0.234  // Porosity
  hc = 25e-3[m]  // core thickness
  hs = 2.5e-3[m]  // skin thickness
  Patm = 1[atm]  // Atmospheric pressure (nitial)
  Pv = 5000[Pa]  // vacuum pressure
  tramp = 10[s]  // time to pull vaccum
  chamfer = 45[deg]  // chamfer angle
  rho_atm = 1.2[kg*m^-3]  // density of air at atmospheric pressure
  L = 15[m]  // core length
  w = 300[mm]  // core width
  r = 20[cm]  // windows radius
  e_b = 10[cm]  // edge bad width
  corr_factor = 0.32  // correction factor for sandwich permeability
  D = 10[m]  // barrel diameter
  gap = 0.3[m]  // gaps between windows

Functions
  int1: Interpolation "pressure decrease" | funcname = ramp; table = {{0, Patm}, {tramp, Pv}}; argunit = s; fununit = Pa

Variables
  var1 "Variables sandwich" on domains 2
    hc_curr = (chamfer_thick)*in_chamfer +hc*in_core  // core thickness field
    in_chamfer = 1-in_core  // is in core chamfer
    in_core = (dist>hc/tan(chamfer))  // is in flat core
    chamfer_thick = dist*tan(chamfer)  // chamfer thickness
    dist = 1/G-0.5
    curr_K = K*(1+corr_factor)  // local permeability
  var2 "Variables edge band" on domains 1, 3-142
    hc_curr = 0[m]  // core thickness
    curr_K = K
  var5 "mass of air"
    rho = rho_atm*P/Patm  // density of air
    surfacic_mass = rho*hc_curr+2*hs*rho*alpha  // mass of air contained in a unit surface

Selections
  sel1: Explicit "chamfers" on boundaries 4, 31-36, 45, 46, 80-82, 124, 167, 171-174, 179, 182, 183, 186-190, 195, 198, 199, 202-206, 211, 214, 215, 218-222, 227, 230, 231, 234-238, 243, 246, 247, 250-254, 259, 262, 263, 266-270, 275, 278, 279, 282-286, 291, 294, 295, 298-302, 307, 310, 311, 314-318, 323, 326, 327, 330-334, 339, 342, 343, 346-350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
    groupcontang = on
  uni1: Union "edge_bands" | input = {geom1_c1_dom, geom1_c2_dom}

Couplings
  intop1: Integration on all domains | opname = intop

Geometry
  geom1 "Geometry 1" (2D, length unit m)
    r1: Rectangle "Full Panel" | pos = {0, 0}; size = {L+2*e_b, D*pi}
    r2: Rectangle "core1" | pos = {e_b, 0}; size = {L, D*pi}
    c1: Circle
      pos = {1, D*pi/4}
      layername = Layer 1
      layer = e_b
      r = r+e_b
      objSelection: selection geom1_c1_pnt
      objSelection: selection geom1_c1_bnd
      objSelection: selection geom1_c1_dom
    spl1: Split | input = c1
    arr1: Array
      input = spl1
      size = {3, 2}
      displ = {2*r+gap, D*pi/2}
      objSelection: selection geom1_arr1_pnt
      objSelection: selection geom1_arr1_bnd
      objSelection: selection geom1_arr1_dom
    r3: Rectangle | pos = {1+6*r+5*gap, D*pi/4}; base = center; size = {1, 2}
    r4: Rectangle | pos = {1+6*r+5*gap, D*pi/4}; base = center; size = {1+e_b*2, 2+e_b*2}
    c2: Circle
      pos = {L-1, D*pi/4}
      layername = Layer 1
      layer = e_b
      r = r+e_b
      objSelection: selection geom1_c2_pnt
      objSelection: selection geom1_c2_bnd
      objSelection: selection geom1_c2_dom
    spl2: Split | input = c2
    arr2: Array
      input = spl2
      size = {14, 2}
      displ = {-2*r-gap, D*pi/2}
      objSelection: selection geom1_arr2_pnt
      objSelection: selection geom1_arr2_bnd
      objSelection: selection geom1_arr2_dom
    arr3: Array | input = r3, r4; size = {1, 2}; displ = {0, D*pi/2}
    r5: Rectangle | pos = {L/2, D*pi/2-3}; size = {3, 2}
    r6: Rectangle | pos = {L/2-e_b, D*pi/2-3-e_b}; size = {3+2*e_b, 2+2*e_b}
    dif4: Difference "Panel"
      input = arr3(1%2C1%2C2), arr3(1%2C2%2C2), r1, r2, r6
      input2 = arr1(1%2C1%2C5), arr1(1%2C2%2C5), arr1(2%2C1%2C5), arr1(2%2C2%2C5), arr1(3%2C1%2C5), arr1(3%2C2%2C5), arr2(1%2C1%2C5), arr2(1%2C2%2C5), arr2(10%2C1%2C5), arr2(10%2C2%2C5), arr2(11%2C1%2C5), arr2(11%2C2%2C5), arr2(12%2C1%2C5), arr2(12%2C2%2C5), arr2(13%2C1%2C5), arr2(13%2C2%2C5), arr2(14%2C1%2C5), arr2(14%2C2%2C5), arr2(2%2C1%2C5), arr2(2%2C2%2C5), arr2(3%2C1%2C5), arr2(3%2C2%2C5), arr2(4%2C1%2C5), arr2(4%2C2%2C5), arr2(5%2C1%2C5), arr2(5%2C2%2C5), arr2(6%2C1%2C5), arr2(6%2C2%2C5), arr2(7%2C1%2C5), arr2(7%2C2%2C5), arr2(8%2C1%2C5), arr2(8%2C2%2C5), arr2(9%2C1%2C5), arr2(9%2C2%2C5), arr3(1%2C1%2C1), arr3(1%2C2%2C1), r5
    fin: Finalize "Form Union"

Physics
  c: CoefficientFormPDE "Darcy Flow" on all domains
    dependent variable P
    Units.DependentVariableQuantity = pressure
    Units.CustomSourceTermUnit = Pa/s
    cfeq1: CoefficientFormPDE "Domain equation" (default)
      c = {P*curr_K/mu, 0, 0, P*curr_K/mu}
      f = 0
      da = alpha + (hc_curr/2) / (hs)
    zflx1: ZeroFluxBoundary "Sealed" (default)
    init1: init "Initial Pressure" (default) | P = Patm
    dir1: DirichletBoundary "Vacuum" on boundaries 1, 170 | r = ramp(t)
    zflx2: ZeroFluxBoundary "symmetry" on no boundaries
  wd: WallDistance on domains 2
    dependent variable G
    sigmaw.sigmaw = 0.05
    deq1: DistanceEquation (default) | LengthScaleSpecification = Manual
    init1: init "Initial Values 1" (default)
    wall1: Wall on selection sel1

Mesh
  mesh1 "Mesh 1"
    size: MeshSizeDefault | hauto = 4
    size1: Size on boundaries 4, 167, 170 | hauto = 2
    ftri1: FreeTri "Free Triangular 1" on remaining entities

Studies
  std1 "Study"
    stat: Stationary | solve for = {wd}
    time: Transient "Time Dependent"
      tlist = range(0,60,840) range(900,900,7200) range(10800,3600,3600*72)
      solve for = {c}
      usesol = on
      notsolmethod = sol
      notstudy = std1

Solver configurations
  sol1 "Solver 1" (study std1)
    v1: Variables "Dependent Variables 1"
    s1: Stationary "Stationary Solver 1"
      dDef: Direct
      fc1: FullyCoupled
    su1: StoreSolution
    v2: Variables "Dependent Variables 2" | initmethod = sol; notsolmethod = sol
    t1: Time "Time-Dependent Solver 1" | tlist = range(0,60,840) range(900,900,7200) range(10800,3600,3600*72)
      dDef: Direct
      fc1: FullyCoupled

Datasets
  dset1: Solution | solution = sol1
  cpt1: CutPoint2D | data = dset1; pointx = e_b+5[cm]; pointy = e_b+w-5[cm]
  cpt5: CutPoint2D "Cut Point 2D 1b" | data = dset1; pointx = e_b+5[cm]; pointy = e_b+5[cm]
  cpt2: CutPoint2D | data = dset1; pointx = e_b+L/2; pointy = e_b+w-5[cm]
  cpt3: CutPoint2D | data = dset1; pointx = e_b+L-5[cm]; pointy = e_b+w-5[cm]
  cpt4: CutPoint2D | data = dset1; pointx = e_b+L-5[cm]; pointy = e_b+5[cm]

Derived values
  max1: MaxSurface "Surface Maximum 1" on all domains | data = dset1; table = tbl2; expr = P
  int1: IntSurface "Surface Integration 1" on all domains | data = dset1; table = tbl3; expr = surfacic_mass; unit = kg

Tables
  tbl1: Table
    // Surface Minimum 1 (P)
    Time | Dependent variable P (Pa)
    0 | 101325
    60 | 5
    120 | 5
    180 | 5
    240 | 5
    300 | 5
    360 | 5
    420 | 5
    480 | 5
    540 | 5
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  tbl2: Table
    // Surface Maximum 1 (P)
    Time | Dependent variable P (Pa)
    0 | 101325
    60 | 101326
    120 | 101326
    180 | 101326
    240 | 101327
    300 | 101328
    360 | 101329
    420 | 101330
    480 | 101332
    540 | 101334
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  tbl3: Table
    // Surface Integration 1 (surfacic_mass)
    Time | mass of air contained in a unit surface (kg)
    0 | 4.49355
    60 | 4.47075
    120 | 4.45423
    180 | 4.4402
    240 | 4.42761
    300 | 4.41594
    360 | 4.4051
    420 | 4.39498
    480 | 4.38535
    540 | 4.37626
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
Plots
  pg1: PlotGroup2D "core thickness" | data = dset1
    surf1: Surface | expr = hc_curr; unit = m
  pg2: PlotGroup2D "2D plot" | data = dset1
    surf1: Surface (disabled) | expr = P
    con1: Contour (disabled) | expr = P
    arws1: ArrowSurface | expr = {-curr_K/mu*Px, -curr_K/mu*Py}
    con2: Contour | expr = P; unit = bar; contourlabels = on
  pg3: PlotGroup1D "experimental locations" | data = dset1
    ptgr1: PointGraph | data = cpt1; expr = P
    ptgr2: PointGraph | data = cpt2; expr = P
    ptgr3: PointGraph | data = cpt3; expr = P
    ptgr4: PointGraph | data = cpt4; expr = P
    ptgr5: PointGraph | data = cpt5; expr = P
  pg4: PlotGroup1D "Pressure minimum" | data = none
    tblp1: Table "Table Graph 1" | table = tbl1
  pg5: PlotGroup1D "1D Plot Group 5" | data = none
    tblp1: Table "Table Graph 1" | table = tbl2
  pg6: PlotGroup1D "mass of air" | data = dset1
    glob1: Global | expr = intop(surfacic_mass); unit = kg

Exports
  img1: Image2D "2D Image 1"
    size = manual
    unit = px
    width = 1600
    height = 1000
    sizedesc = 212 x 132 mm
    pngfilename = full
    options = on
    axes = off