// COMSOL Multiphysics 4.3a (Build: 161) model "homogenisation2.mph"
// Outline of the model tree

Parameters
  wall_th = 50[um]  // core wall thickness
  cell_size = 3.2[mm]  // cell size
  skin_th = 1.2[mm]  // skin thickness
  Kx = 5.5e-14[m^2]  // in plane skin permeability
  Kz = 5e-16[m^2]  // through thickness skin permeability
  mu = 1[Pa*s]  // air viscosity
  P0 = 1[bar]
  P1 = 0.5[bar]

Variables
  var1 "Variables 1a"
    flux1 = intop1(-Kz/mu*Py)
    flux2 = intop2(-Kz/mu*Py)
    Keq1 = flux1/skin_th*cell_size*mu/(P1-P0)
    Keq2 = flux2/skin_th*cell_size*mu/(P1-P0)

Couplings
  aveop2: Average on domains 1 | opname = aveop
  intop1: Integration on boundaries 2
  intop2: Integration on boundaries 5

Geometry
  geom1 "Geometry 1" (2D, length unit m)
    r2: Rectangle | pos = {-wall_th/2-cell_size/2, 0}; type = solid; base = corner; size = {cell_size+wall_th, skin_th}
    pt1: Point | p = {-wall_th/2, 0}
    pt2: Point | p = {wall_th/2, 0}
    fin: Finalize "Form Union"

Physics
  c: CoefficientFormPDE on all domains
    dependent variable P
    Units.DependentVariableQuantity = pressure
    Units.CustomSourceTermUnit = 1/s
    cfeq1: CoefficientFormPDE (default) | c = {Kx/mu, 0, 0, Kz/mu}; f = 0; da = 1
    zflx1: ZeroFluxBoundary "Zero Flux 1" (default)
    init1: init "Initial Values 1" (default) | P = P1
    dir1: DirichletBoundary "Dirichlet Boundary Condition 1" on boundaries 2 | r = P0
    dir2: DirichletBoundary "Dirichlet Boundary Condition 2" on boundaries 5 | r = P1

Mesh
  mesh1 "Mesh 1"
    size: MeshSizeDefault | hmax = 2.18E-4; hmin = 9.75E-7; hcurve = 0.3; hnarrow = 1; hgrad = 1.3; hauto = 5
    size1: Size on boundaries 4 | hauto = 1
    ftri1: FreeTri "Free Triangular 1a" on remaining entities

Studies
  std2 "Study 2"
    stat: Stationary

Solver configurations
  sol2 "Solver 2" (study std2)
    v1: Variables "Dependent Variables 1"
    s1: Stationary "Stationary Solver 1"
      dDef: Direct
      fc1: FullyCoupled

Datasets
  dset2: Solution | solution = sol2

Derived values
  gev1: EvalGlobal "Global Evaluation 1" | data = dset2; table = tbl4; expr = Keq1/Kx
  int1: IntSurface "Surface Integration 1" on domains 1 | data = dset2; table = tbl2; expr = Kx*Px*cell_size/(P1-P0)*mu
  av1: AvSurface "Surface Average 1" on domains 1 | data = dset2; table = tbl3; expr = Kx*Px*cell_size/(P1-P0)*mu/Kx
  gev2: EvalGlobal "Global Evaluation 2" | data = dset2; table = tbl1; expr = Keq2/Kx

Tables
  tbl1: Table
    // Global Evaluation 1 (intop1(Kz/mu*Py))
    Keq2/Kx (1)
    0.320913
  tbl2: Table
    // Surface Integration 1 (Kx*Px)
    Kx*Px*cell_size/(P1-P0)*mu (m^3*kg/s)
    3.13412e-20
  tbl3: Table
    // Surface Average 1 (Kx*Px*cell_size/(P1-P0)*mu)
    Kx*Px*cell_size/(P1-P0)*mu/Kx (N*s/(m*m))
    0.147056
  tbl4: Table
    // Global Evaluation 1 (Keq1/Kx)
    Keq1/Kx (1) | Keq1/Kx (1) | Keq1/Kx (1)
    -0.0525294 | -0.28648 | -0.322981

Plots
  pg2: PlotGroup2D "2D Plot Group 2" | data = dset2
    surf1: Surface | expr = P
    arws1: ArrowSurface | expr = {-Kx/mu*Px, -Kz/mu*Py}

Exports
  img1: Image2D "2D Image 1"
    size = manual
    unit = px
    width = 1000
    height = 400
    pngfilename = meso_field
    options = on
    axes = off