// COMSOL Multiphysics 4.3a (Build: 161) model "first_hold.mph"
// This solves the air extraction in a sandwich panel.
// Outline of the model tree

Parameters
  K = 1.2e-13[m^2]  // in plane Permeability
  mu = 1.85e-5[Pa*s]  // air viscosity
  alpha = 0.234  // Porosity
  hc = 20e-3[m]  // core thickness
  hs = 1.2e-3[m]  // skin thickness
  Patm = 1[atm]  // Atmospheric pressure (nitial)
  Pv = 0.05[bar]  // vacuum pressure
  tramp = 10[s]  // time to pull vaccum
  e_b = 2.625[in]  // edge band width
  L = 898[mm]  // panel length
  w = 298[mm]  // panel width
  chamfer = 45[deg]  // chamfer angle
  rho_atm = 1.2[kg*m^-3]  // density of air at atmospheric pressure
  corr_factor = 0.32  // correction factor for equivalent sandwich permeability

Functions
  int1: Interpolation "pressure decrease" | funcname = ramp; table = {{0, Patm}, {tramp, Pv}}; argunit = s; fununit = Pa
  int2: Interpolation "experimental measures" | funcs = {{P0, 1}, {P1, 2}, {P2, 3}, {P3, 4}}; source = file; filename = /home/arthur/Documents/Jim/first_hold.txt; nargs = 1; argunit = s; fununit = bar
  int3: Interpolation "initial pressure" | funcname = P_init; table = {{L/2, 1}, {-L/2, 1}}; extrap = const; argunit = m; fununit = atm
  int4: Interpolation "Interpolated permeability vs time" (disabled)
    funcname = transient_K
    table = 
      {0, 1.20120481928e-13}
      {1356.8757789672, 8.93E-014}
      {1909.015371828, 1.34E-013}
      {2469.048608214, 8.42E-014}
      {2790.6107187384, 8.39E-014}
      {3592.8541753092, 8.24E-014}
      {3748.23431658, 7.84E-014}
      {4734.5243041015, 8.02E-014}
      {4771.084337352, 7.52E-014}
      {5722.476111344, 7.34E-014}
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    argunit = s
    fununit = m^2
  an1: Analytic "Analytic permeability vs time" | funcname = transient_K; expr = 0*1e-13*exp(-2e-4*t)+0*5.5e-14 + K; args = t; dermethod = automatic; argders = {t, -8.57e-14*5.36e-6*exp(-5.36e-6*t)}; argunit = s; fununit = m^2

Variables
  var1 "Variables sandwich" on domains 2
    hc_curr = (chamfer_thick)*in_chamfer +hc*in_core  // core thickness field
    in_chamfer = 1-in_core  // is in core chamfer
    in_core = (abs(x)<L/2-hc/tan(chamfer))*(y<w/2-hc/tan(chamfer))  // is in flat core
    chamfer_thick = min(w/2-y,L/2-abs(x))  // chamfer thickness
    corrected_K = transient_K(t)*(1+corr_factor)  // corrected permeability
  var2 "Variables edge band" on domains 1
    hc_curr = 0[m]  // core thickness
    corrected_K = transient_K(t)  // corrected permeability
  var5 "mass of air"
    rho = rho_atm*P/Patm  // density of air
    surfacic_mass = rho*hc_curr+2*hs*rho*alpha  // mass of air contained in a unit surface

Couplings
  intop1: Integration on all domains | opname = intop

Geometry
  geom1 "Geometry 1" (2D, length unit m)
    r1: Rectangle "Full Panel" | pos = {-L/2-e_b, 0}; type = solid; base = corner; size = {L+2*e_b, w/2+e_b}
    r2: Rectangle "sandwich part" | pos = {-L/2, 0}; type = solid; base = corner; size = {L, w/2}
    fin: Finalize "Form Union"

Physics
  c: CoefficientFormPDE "Darcy Flow" on domains 1, 2
    dependent variable P
    Units.DependentVariableQuantity = pressure
    Units.CustomSourceTermUnit = Pa/s
    cfeq1: CoefficientFormPDE "Domain equation" (default)
      c = {P*corrected_K/mu, 0, 0, P*corrected_K/mu}
      f = 0
      da = alpha + (hc_curr/2) / (1*hs)
    zflx1: ZeroFluxBoundary "Sealed" (default)
    init1: init "Initial Pressure" (default) | P = P_init(x)
    dir1: DirichletBoundary "Vacuum" on boundaries 1 | r = ramp(t)
    zflx2: ZeroFluxBoundary "symmetry" on boundaries 2, 5, 8

Mesh
  mesh1 "Mesh"
    size: MeshSizeDefault | hmax = w/10; hauto = 3; custom = on
    size1: Size on boundaries 4, 6, 7, 9 | hmax = w/35; hauto = 1; custom = on
    ftri1: FreeTri "Free Triangular 1" on remaining entities

Studies
  std1 "Study"
    time: Transient "Time Dependent"
      tlist = range(0,60,840) range(900,900,7200) range(10800,3600,59500)
      physselection = c
      usesol = on
      notsolmethod = sol
      notstudy = std1

Solver configurations
  sol1 "Solver 1" (study std1)
    v1: Variables "Dependent Variables 1"
    t1: Time "Time-Dependent Solver 1" | tlist = range(0,60,840) range(900,900,7200) range(10800,3600,59500)
      dDef: Direct
      fc1: FullyCoupled

Datasets
  dset2: Solution "2D solution" | solution = sol1
  cpt3: CutPoint2D "point 1" | data = dset2; pointx = -L/2+48e-3; pointy = 0
  cpt5: CutPoint2D "point 2" | data = dset2; pointx = -L/2+250e-3; pointy = 0
  cpt2: CutPoint2D "point 3" | data = dset2; pointx = 2e-3; pointy = 0
  cpt1: CutPoint2D "point 4" | data = dset2; pointx = -L/2+850e-3; pointy = 0
  cln1: CutLine2D "cross sections"
    data = dset2
    genpoints = {{L/2-3e-2, 0}, {L/2-3e-2, w/2+e_b}}
    genparadist = range(L/4,(L-6e-2-L/4)/2,L-6e-2)

Derived values
  pev1: EvalPoint "Point Evaluation 1" | data = cpt3; table = tbl5; expr = sqrt(timeavg(0,3600*16,(P-P0(t))^2))
  pev2: EvalPoint "Point Evaluation 2" | data = cpt5; table = tbl2; expr = sqrt(timeavg(0,3600*16,(P-P1(t))^2))
  pev3: EvalPoint "Point Evaluation 3" | data = cpt2; table = tbl3; expr = sqrt(timeavg(0,3600*16,(P-P2(t))^2))
  pev4: EvalPoint "Point Evaluation 4" | data = cpt1; table = tbl4; expr = sqrt(timeavg(0,3600*16,(P-P3(t))^2))

Tables
  tbl1: Table
    // Point Evaluation 1 (timeavg(0,100,P))
    sqrt(timeavg(0,3600*16,(P-P0(t))^2/P^2)) (1), Point: (-0.40, 0)
    0.112541
  tbl2: Table
    // Point Evaluation 2 (sqrt(timeavg(0,3600*16,(P-P1(t))^2/P^2)))
    Time | sqrt(timeavg(0,3600*16,(P-P1(t))^2/P^2)) (1), Point: (-0.20, 0) | sqrt(timeavg(0,3600*16,(P-P1(t))^2)) (Pa), Point: (-0.20, 0) | sqrt(timeavg(0,3600*16,(P-P1(t))^2)) (Pa), Point: (-0.20, 0)
    0 | 0.313939 | 4343.98 | 6929.14
  tbl3: Table
    // Point Evaluation 3 (sqrt(timeavg(0,3600*16,(P-P2(t))^2/P^2)))
    Time | sqrt(timeavg(0,3600*16,(P-P2(t))^2/P^2)) (1), Point: (0.0020, 0) | sqrt(timeavg(0,3600*16,(P-P2(t))^2)) (Pa), Point: (0.0020, 0) | sqrt(timeavg(0,3600*16,(P-P2(t))^2)) (Pa), Point: (0.0020, 0)
    0 | 0.416069 | 7225.04 | 11326.9
  tbl4: Table
    // Point Evaluation 4 (sqrt(timeavg(0,3600*16,(P-P3(t))^2/P^2)))
    Time | sqrt(timeavg(0,3600*16,(P-P3(t))^2/P^2)) (1), Point: (0.40, 0) | sqrt(timeavg(0,3600*16,(P-P3(t))^2)) (Pa), Point: (0.40, 0) | sqrt(timeavg(0,3600*16,(P-P3(t))^2)) (Pa), Point: (0.40, 0)
    0 | 0.483946 | 9960.42 | 15068
  tbl5: Table
    // Point Evaluation 1 (sqrt(timeavg(0,3600*16,(P-P0(t))^2)))
    Time | sqrt(timeavg(0,3600*16,(P-P0(t))^2)) (Pa), Point: (-0.40, 0) | sqrt(timeavg(0,3600*16,(P-P0(t))^2)) (Pa), Point: (-0.40, 0)
    0 | 2473.87 | 3239.38

Plots
  pg1: PlotGroup2D "2D Plot Group 1" | data = dset2; animating = off
    surf1: Surface (disabled) | expr = P0(t); wireframe = off
    con1: Contour "Pressure" (disabled)
      expr = P
      levelmethod = levels
      levels = range(0,Patm/30,Patm)
      contourtype = lines
    arws1: ArrowSurface "Apparent velocity" (disabled) | expr = {-K/mu*Px, -K/mu*Py}
    surf2: Surface "Pressure_surf" | expr = hc_curr; unit = m; wireframe = off
      hght1: Height "Height Expression 1" | heightdata = expr; expr = hc_curr; unit = mm; offset = -0.02
    mesh1: Mesh (disabled)
  pg2: PlotGroup1D "Line plot"
    data = dset2
    title = Comparison of one dimensional and two dimensional (along centerline) predicitions.
    ylabel = Pressure (Pa)
    lngr2: LineGraph "2D pressure profile" on boundaries 2, 5, 8 | expr = P; xdata = expr; xdataexpr = x
  pg3: PlotGroup1D "Corner pressure" | data = none
    ptgr1: PointGraph "2D model" on points 1 | data = dset2; expr = P; legends = 2D model
  pg4: PlotGroup1D "at experimental locations" | data = none; title = In plane permeability Kxx= 3e-13 m^2.
    ptgr1: PointGraph | data = cpt3; expr = P; xdata = expr; xdataexpr = t; legends = model 1
    ptgr2: PointGraph | data = cpt5; expr = P; xdata = expr; xdataexpr = t; legends = model 2
    ptgr5: PointGraph | data = cpt2; expr = P; xdata = expr; xdataexpr = t; legends = model 3
    ptgr3: PointGraph | data = cpt1; expr = P; xdata = expr; xdataexpr = t; legends = model 4
    glob1: Global "experiments"
      data = dset2
      expr = {P0(t), P1(t), P2(t), P3(t)}
      descr = {Experiment 1, Experiment 2, Experiment 3, Experiment 4}
      xdata = expr
      xdataexpr = t
  pg5: PlotGroup1D "cross sections" | data = cln1
    lngr1: LineGraph | expr = P; xdata = expr; xdataexpr = y
  pg6: PlotGroup1D "mass of air" | data = dset2; ylabel = Mass of air (g)
    glob1: Global "mass of air"
      expr = {intop(surfacic_mass), intop(rho*hc_curr), intop(2*alpha*rho*hs)}
      unit = {g, g, g}
      descr = {total mass of air in the system, mass of air in the core, mass of air in the skin, }
      xdata = expr
      xdataexpr = t
      autoexpr = off
  pg7: PlotGroup1D "1D Plot Group 7" | data = dset2
    glob1: Global | expr = varying_K(t)
  pg8: PlotGroup1D "at experimental locations errors" | data = none; title = In plane permeability Kxx= 3e-13 m^2.
    ptgr1: PointGraph | data = cpt3; expr = abs(P-P0(t)); xdata = expr; xdataexpr = t; legends = model 0
    ptgr2: PointGraph | data = cpt5; expr = abs(P-P1(t)); xdata = expr; xdataexpr = t; legends = model 1
    ptgr5: PointGraph | data = cpt2; expr = abs(P-P2(t)); xdata = expr; xdataexpr = t; legends = model 2
    ptgr3: PointGraph | data = cpt1; expr = abs(P-P3(t)); xdata = expr; xdataexpr = t; legends = model 3

Exports
  img1: Image1D "1D Image 1"
    size = manual
    unit = px
    width = 800
    height = 500
    pngfilename = centerline
    options = on
    axes = on
  img2: Image1D "1D Image 2"
    size = manual
    unit = px
    width = 800
    height = 500
    epsfilename = /home/arthur/Documents/Jim/Paper/P_vs_time_first.eps
    options = on
    axes = on
  img3: Image1D "1D Image 3"
    size = manual
    unit = px
    width = 800
    height = 500
    pngfilename = mass
    options = on
    axes = on